// SBML level 2 version 3

model model_even_smaller()

  // Compartments:
  compartment cell = 1;

  // Species:
  species TGFb_r in cell = s_TGFb*(TGFb_0 + b_TGFb); TGFb_r is "TGFb(r)";
  species IL6_r in cell = s_IL6*(IL6_0 + b_IL6); IL6_r is "IL6(r)";
  species S3 in cell = IL6R_0; S3 is "IL6R(activity~I,l_bind,stat3_site)";
  species S4 in cell = TGFbR_0; S4 is "TGFbR(activity~I,l_bind,smad3_site)";
  species S5 in cell = SMAD3_0; S5 is "SMAD3(phos~U,pka_site,smad4_site,stat3_site,tgfbr_site)";
  species SMAD4_s3_site in cell = SMAD4_0; SMAD4_s3_site is "SMAD4(s3_site)";
  species S7 in cell = STAT3m_0; S7 is "STAT3m(d,il6r_site,phos~U,s3_site)";
  species PKA_phos_U_s3s4_site in cell = PKA_0; PKA_phos_U_s3s4_site is "PKA(phos~U,s3s4_site)";
  species S9 in cell = 0; S9 is "IL6(r!1).IL6R(activity~I,l_bind!1,stat3_site)";
  species S10 in cell = 0; S10 is "TGFb(r!1).TGFbR(activity~I,l_bind!1,smad3_site)";
  species S11 in cell = 0; S11 is "IL6(r!1).IL6R(activity~A,l_bind!1,stat3_site)";
  species S12 in cell = 0; S12 is "TGFb(r!1).TGFbR(activity~A,l_bind!1,smad3_site)";
  species S13 in cell = 0; S13 is "SMAD3(phos~U,pka_site,smad4_site,stat3_site,tgfbr_site!1).TGFb(r!2).TGFbR(activity~A,l_bind!2,smad3_site!1)";
  species S14 in cell = 0; S14 is "IL6(r!1).IL6R(activity~A,l_bind!1,stat3_site!2).STAT3m(d,il6r_site!2,phos~U,s3_site)";
  species S15 in cell = 0; S15 is "SMAD3(phos~P,pka_site,smad4_site,stat3_site,tgfbr_site)";
  species S16 in cell = 0; S16 is "STAT3m(d,il6r_site,phos~P,s3_site)";
  species S17 in cell = 0; S17 is "STAT3m(d!1,il6r_site,phos~P,s3_site).STAT3m(d!1,il6r_site,phos~P,s3_site)";
  species S18 in cell = 0; S18 is "SMAD3(phos~P,pka_site,smad4_site!1,stat3_site,tgfbr_site).SMAD4(s3_site!1)";
  species S19 in cell = 0; S19 is "SMAD3(phos~P,pka_site,smad4_site,stat3_site!1,tgfbr_site).STAT3m(d!2,il6r_site,phos~P,s3_site!1).STAT3m(d!2,il6r_site,phos~P,s3_site)";
  species S20 in cell = 0; S20 is "PKA(phos~U,s3s4_site!1).SMAD3(phos~P,pka_site!1,smad4_site!2,stat3_site,tgfbr_site).SMAD4(s3_site!2)";
  species S21 in cell = 0; S21 is "SMAD3(phos~P,pka_site,smad4_site,stat3_site!1,tgfbr_site).STAT3m(d,il6r_site,phos~P,s3_site!1)";
  species S22 in cell = 0; S22 is "SMAD3(phos~P,pka_site,smad4_site,stat3_site!1,tgfbr_site).STAT3m(d,il6r_site,phos~U,s3_site!1)";
  species S23 in cell = 0; S23 is "PKA(phos~P,s3s4_site!1).SMAD3(phos~P,pka_site!1,smad4_site!2,stat3_site,tgfbr_site).SMAD4(s3_site!2)";
  species S24 in cell = 0; S24 is "SMAD3(phos~U,pka_site,smad4_site,stat3_site!1,tgfbr_site).STAT3m(d!2,il6r_site,phos~P,s3_site!1).STAT3m(d!2,il6r_site,phos~P,s3_site)";
  species S25 in cell = 0; S25 is "IL6(r!1).IL6R(activity~A,l_bind!1,stat3_site!2).SMAD3(phos~P,pka_site,smad4_site,stat3_site!3,tgfbr_site).STAT3m(d,il6r_site!2,phos~U,s3_site!3)";
  species S26 in cell = 0; S26 is "SMAD3(phos~P,pka_site,smad4_site,stat3_site!1,tgfbr_site).SMAD3(phos~P,pka_site,smad4_site,stat3_site!2,tgfbr_site).STAT3m(d!3,il6r_site,phos~P,s3_site!1).STAT3m(d!3,il6r_site,phos~P,s3_site!2)";
  species S27 in cell = 0; S27 is "SMAD3(phos~U,pka_site,smad4_site,stat3_site!1,tgfbr_site).STAT3m(d,il6r_site,phos~P,s3_site!1)";
  species S28 in cell = 0; S28 is "SMAD3(phos~U,pka_site,smad4_site,stat3_site!1,tgfbr_site).STAT3m(d,il6r_site,phos~U,s3_site!1)";
  species PKA_phos_P_s3s4_site in cell = 0; PKA_phos_P_s3s4_site is "PKA(phos~P,s3s4_site)";
  species S30 in cell = 0; S30 is "IL6(r!1).IL6R(activity~A,l_bind!1,stat3_site!2).SMAD3(phos~U,pka_site,smad4_site,stat3_site!3,tgfbr_site).STAT3m(d,il6r_site!2,phos~U,s3_site!3)";
  species S31 in cell = 0; S31 is "SMAD3(phos~P,pka_site,smad4_site,stat3_site!1,tgfbr_site).SMAD3(phos~U,pka_site,smad4_site,stat3_site!2,tgfbr_site).STAT3m(d!3,il6r_site,phos~P,s3_site!1).STAT3m(d!3,il6r_site,phos~P,s3_site!2)";
  species S32 in cell = 0; S32 is "SMAD3(phos~U,pka_site,smad4_site,stat3_site!1,tgfbr_site).SMAD3(phos~U,pka_site,smad4_site,stat3_site!2,tgfbr_site).STAT3m(d!3,il6r_site,phos~P,s3_site!1).STAT3m(d!3,il6r_site,phos~P,s3_site!2)";

  // Parameters:
  TGFb_0 = 1;
  IL6_0 = 0;
  s_TGFb = 1;
  b_TGFb = 0;
  s_IL6 = 1;
  b_IL6 = 0;
  kf_il6_bind = 0.3;
  kr_il6_bind = 0.05;
  k_act_il6r = 3;
  k_deact_il6r = 0.01;
  kf_tgfb_bind = 0.05;
  kr_tgfb_bind = 0.2;
  k_act_tgfbr = 0.8;
  k_deact_tgfbr = 0.02;
  k_phos_smad3 = 0.015;
  k_dephos_smad3 = 0.035;
  kr_smad3_bind = 0.05;
  kf_stat3_bind = 0.12;
  k_phos_stat3 = 0.15;
  kf_dimer = 0.5;
  k_dephos_stat3d = 0.06;
  kr_dimer = 0.05;
  k_dephos_stat3p = 0.08;
  kf_smad3_bind = 0.08;
  kr_s3stat3d = 0.2;
  k_dephos_s3stat3d = 0.3;
  kf_s3s4 = 0.6;
  kf_s3stat3d = 4;
  kf_pka_bind = 1;
  k_phos_pka = 0.5;
  k_off_pka = 0.1;
  IL6R_0 = 250;
  TGFbR_0 = 40;
  SMAD3_0 = 45;
  SMAD4_0 = 30;
  STAT3m_0 = 250;
  PKA_0 = 50;

  // Assignment rules:
  Free_IL6_obs := 0 + IL6_r;
  Free_TGFb_obs := 0 + TGFb_r;
  IL6R_Active := S11 + S14 + S25 + S30;
  TGFbR_Active := S12 + S13;
  pSMAD3_obs := S15 + S18 + S19 + S20 + S21 + S22 + S23 + S25 + 2*S26 + S31;
  pSTAT3_obs := S16 + S21 + S27;
  STAT3d_active_obs := 2*S17 + 2*S19 + 2*S24 + 2*S26 + 2*S31 + 2*S32;
  S3S4_complex_obs := S18 + S20 + S23;
  S3STAT3d_complex_obs := S19 + S21 + S22 + S24 + S25 + 2*S26 + S27 + S28 + S30 + 2*S31 + 2*S32;
  PKA_active := S23 + PKA_phos_P_s3s4_site;
  Total_SMAD3_obs := S5 + S13 + S15 + S18 + S19 + S20 + S21 + S22 + S23 + S24 + S25 + 2*S26 + S27 + S28 + S30 + 2*S31 + 2*S32;
  Total_STAT3_obs := S7 + S14 + S16 + 2*S17 + 2*S19 + S21 + S22 + 2*S24 + S25 + 2*S26 + S27 + S28 + S30 + 2*S31 + 2*S32;

  // Reactions:
  R1: IL6_r + S3 => S9; kf_il6_bind*IL6_r*S3;
  R2: TGFb_r + S4 => S10; kf_tgfb_bind*TGFb_r*S4;
  R3: S9 => IL6_r + S3; kr_il6_bind*S9;
  R4: S9 => S11; k_act_il6r*S9;
  R5: S10 => TGFb_r + S4; kr_tgfb_bind*S10;
  R6: S10 => S12; k_act_tgfbr*S10;
  R7: S11 => IL6_r + S3; k_deact_il6r*S11;
  R8: S12 => TGFb_r + S4; k_deact_tgfbr*S12;
  R9: S5 + S12 => S13; kf_smad3_bind*S5*S12;
  R10: S7 + S11 => S14; kf_stat3_bind*S7*S11;
  R11: S13 => S5 + S12; kr_smad3_bind*S13;
  R12: S13 => S12 + S15; k_phos_smad3*S13;
  R13: S14 => S11 + S16; k_phos_stat3*S14;
  R14: S15 => S5; k_dephos_smad3*S15;
  R15: S16 + S16 => S17; 0.5*kf_dimer*S16*S16;
  R16: S16 => S7; k_dephos_stat3p*S16;
  R17: SMAD4_s3_site + S15 => S18; kf_s3s4*SMAD4_s3_site*S15;
  R18: S17 => S16 + S16; kr_dimer*S17;
  R19: S17 => S7 + S7; k_dephos_stat3d*S17;
  R20: S15 + S17 => S19; 2*kf_s3stat3d*S15*S17;
  R21: PKA_phos_U_s3s4_site + S18 => S20; kf_pka_bind*PKA_phos_U_s3s4_site*S18;
  R22: S19 => S16 + S21; kr_dimer*S19;
  R23: S19 => S7 + S22; k_dephos_stat3d*S19;
  R24: S19 => S15 + S17; kr_s3stat3d*S19;
  R25: S20 => PKA_phos_U_s3s4_site + S18; k_off_pka*S20;
  R26: S20 => S23; k_phos_pka*S20;
  R27: S19 => S24; k_dephos_s3stat3d*S19;
  R28: S11 + S22 => S25; kf_stat3_bind*S11*S22;
  R29: S16 + S21 => S19; kf_dimer*S16*S21;
  R30: S21 + S21 => S26; 0.5*kf_dimer*S21*S21;
  R31: S24 => S16 + S27; kr_dimer*S24;
  R32: S21 => S22; k_dephos_stat3p*S21;
  R33: S24 => S7 + S28; k_dephos_stat3d*S24;
  R34: S23 => S18 + PKA_phos_P_s3s4_site; k_off_pka*S23;
  R35: S11 + S28 => S30; kf_stat3_bind*S11*S28;
  R36: S25 => S11 + S21; k_phos_stat3*S25;
  R37: S16 + S27 => S24; kf_dimer*S16*S27;
  R38: S21 + S27 => S31; kf_dimer*S21*S27;
  R39: S27 + S27 => S32; 0.5*kf_dimer*S27*S27;
  R40: S26 => S21 + S21; kr_dimer*S26;
  R41: S27 => S28; k_dephos_stat3p*S27;
  R42: S26 => S22 + S22; k_dephos_stat3d*S26;
  R43: S30 => S11 + S27; k_phos_stat3*S30;
  R44: S31 => S21 + S27; kr_dimer*S31;
  R45: S32 => S27 + S27; kr_dimer*S32;
  R46: S31 => S22 + S28; k_dephos_stat3d*S31;
  R47: S32 => S28 + S28; k_dephos_stat3d*S32;

  // Unit definitions:
  unit substance = item;
end
